## Гамма распределение
## 1. Функция плотности
# t := 0,0.1..3
f(t, a, b) := b^a/Γ(a)*t^(a - 1)*e^(-b*t)
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## 2. Функция распределения
Q(t, a, b) := integral(f(t, a, b), t = 0 .. t)
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## 3.Начальные моменты
a1(a, b) := integral(x*f(x, a, b), x = 0 .. 10)
a2(a, b) := integral(x^2*f(x, a, b), x = 0 .. 10)
a3(a, b) := integral(x^3*f(x, a, b), x = 0 .. 10)
## 4.Мат ожидание
M1(a, b) := a1(a, b)
M1(4, 10) = 0.4
M2(a, b) := a/b
M2(4, 10) = 0.4
# t1 := 1,1.1..10
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## 5. Мода
a := 4
b := 20
mo(x, a, b) := root(d/dX(f(X, a, b)), X, 0, 1)
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mo(0, a, b) = 0.15
## 6. Медиана
root(Q(x, 4, 20) - 1/2, x, 0, 1) = 0.183603
## 7. Дисперсия
D1(a, b) := a2(a, b) - a1(a, b)^2
D1(4, 20) = 0.01
D2(a, b) := a/b^2
D2(4, 20) = 0.01
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c2 := 0, 0.1 .. 100
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## 8. Среднеквадратичное отклонение
sigma(a, b) := sqrt(D1(a, b))
sigma(4, 20) = 0.1
## 9. Коэффициент асимметрии
mu(a, b) := 2*a1(a, b)^3 - 3*a1(a, b)*a2(a, b) + a3(a, b)
S1(a, b) := mu(a, b)/sigma(a, b)^3
c2 := 2, 2.1 .. 5
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